t1 := [
    2.2; 2.3; 2.4167; 2.5167; 2.5833; 2.9833; 3.2; 3.2667; 3.7833; 3.9667
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]
f1 := [
    0; 0; 0; 0; 0; 0; 0; 0; 0; 0
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]
df1 := [
    -0.03508; -0.07641; -0.30046; 0.32461; -0.82767; -0.55932; 0.2377; -1.8224; -0.4423; -0.42416
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]
df2 := [
    -1.7549; 0.62447; -2.576; 1.7968; 1.2227; -2.4852; 3.3023; 1.1878; -1.0319; 0.12975
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]
f2 := [
    0; 0; 0; 0; 0; 0; 1; 0; 0; 0
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]
t2 := [
    3.35; 3.6; 3.75; 3.8333; 3.9167; 4; 4.0833; 4.1667; 4.25; 4.3333
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]
f3 := [
    1; 0; 1; 1; 1; 0; 1; 1; 0; 1
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]
df3 := [
    1.5079; 1.8919; 0.58437; 0.34618; 3.6197; -1.4179; 2.5482; 2.5483; -0.23963; -0.7085
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]
t3 := [
    1.1333; 1.2667; 1.5; 1.7833; 3.15; 3.25; 3.35; 3.4167; 3.55; 3.7167
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]
λ := 3, 3.01 .. 13
DFa1(λ) := linterp(t1, df1, λ)
Fa1(λ) := linterp(t1, f1, λ)
DFa2(λ) := linterp(t2, df2, λ)
Fa2(λ) := linterp(t2, f2, λ)
DFa3(λ) := linterp(t3, df3, λ)
Fa3(λ) := linterp(t3, f3, λ)
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aveDF(λ) := 1/3*(DFa1(λ) + DFa2(λ) + DFa3(λ))
aveF(λ) := 1/3*(Fa1(λ) + Fa2(λ) + Fa3(λ))
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